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/BATCH
/COM,ANSYS RELEASE 12.1    UP20091102       19:45:12    10/23/2016
/input,menust,tmp,'',,,,,,,,,,,,,,,,1
/GST,ON
/PLO,INFO,3
/GRO,CURL,ON
/CPLANE,1
WPSTYLE,,,,,,,,0
/NOPR
/PMETH,OFF,0
KEYW,PR_SET,1
KEYW,PR_STRUC,1
KEYW,PR_THERM,0
KEYW,PR_FLUID,0
KEYW,PR_ELMAG,0
KEYW,MAGNOD,0
KEYW,MAGEDG,0
KEYW,MAGHFE,0
KEYW,MAGELC,0
KEYW,PR_MULTI,0
KEYW,PR_CFD,0
/GO
/COM,
/COM,Preferences for GUI filtering have been set to display:
/COM,  Structural
/PREP7
ET,1,BEAM4
R,1,0.0001,8.3e-10,8.3e-10, , , ,
RMORE, ,1.58e-9, , , , ,
MPTEMP,,,,,,,,
MPTEMP,1,0
MPDATA,EX,1,,2.04e11
MPDATA,PRXY,1,,0.33
K,1,0,0,0,
K,2,1/4,0,0,
K,3,1/2,0,0,
K,4,3/4,0,0,
K,5,1,0,0,
K,6,1,1/2,0,
K,7,3/4,1/2,0,
K,8,1/2,1/2,0,
K,9,1/4,1/2,0,
K,10,0,1/2,0,
K,11,0,0,1/2,
K,12,1/4,0,1/2,
K,13,1/2,0,1/2,
K,14,3/4,0,1/2,
K,15,1,0,1/2,
K,16,1,1/2,1/2,
K,17,3/4,1/2,1/2,
K,18,1/2,1/2,1/2,
K,19,1/4,1/2,1/2,
K,20,0,1/2,1/2,
LSTR,       1,       2
LSTR,       2,       3
LSTR,       3,       4
LSTR,       4,       5
LSTR,       5,       6
LSTR,       6,       7
LSTR,       7,       8
LSTR,       8,       9
LSTR,       9,      10
LSTR,      10,       1
LSTR,      11,      12
LSTR,      12,      13
LSTR,      13,      14
LSTR,      14,      15
LSTR,      15,      16
LSTR,      16,      17
LSTR,      17,      18
LSTR,      18,      19
LSTR,      19,      20
LSTR,      20,      11
LSTR,      20,      10
LSTR,      11,       1
LSTR,      16,       6
LSTR,      15,       5
LSTR,       1,       9
LSTR,       9,       2
LSTR,       9,       3
LSTR,       3,       7
LSTR,       7,       4
LSTR,       7,       5
LSTR,       8,       3
LSTR,      11,      19
LSTR,      19,      13
LSTR,      19,      12
LSTR,      18,      13
LSTR,      13,      17
LSTR,      17,      15
LSTR,      17,      14
LSTR,      19,       9
LSTR,      18,       8
LSTR,      17,       7
LSTR,      14,       4
LSTR,      13,       3
LSTR,      12,       2
LESIZE,ALL, , ,1, ,1, , ,1,
KPLOT
/NUMBER,0
LPLOT
FLST,2,44,4,ORDE,2
FITEM,2,1
FITEM,2,-44
LMESH,P51X
KPLOT
LPLOT
FLST,2,6,3,ORDE,6
FITEM,2,1
FITEM,2,5
FITEM,2,10
FITEM,2,15
FITEM,2,-16
FITEM,2,20
FLST,2,8,3,ORDE,8
FITEM,2,1
FITEM,2,5
FITEM,2,-6
FITEM,2,10
FITEM,2,-11
FITEM,2,15
FITEM,2,-16
FITEM,2,20
/GO
DK,P51X, ,0, ,0,ALL, , , , , ,
FLST,2,1,3,ORDE,1
FITEM,2,8
/GO
FK,P51X,FY,-100
FLST,2,1,3,ORDE,1
FITEM,2,18
/GO
FK,P51X,FY,-100
FINISH
/SOL
/STATUS,SOLU
SOLVE
FINISH
/POST1
PLDISP,1
FINISH
! /EXIT,ALL
/BATCH
/COM,ANSYS RELEASE 12.1    UP20091102       19:52:30    10/23/2016
/input,menust,tmp,'',,,,,,,,,,,,,,,,1
/GST,ON
/PLO,INFO,3
/GRO,CURL,ON
/CPLANE,1
WPSTYLE,,,,,,,,0
RESUME,'complex_beam','db','.'
/COM,ANSYS RELEASE 12.1    UP20091102       19:52:35    10/23/2016
/POST1
PLDISP,1
FINISH
! /EXIT,NOSAV
/BATCH
/COM,ANSYS RELEASE 12.1    UP20091102       19:53:44    10/23/2016
/input,menust,tmp,'',,,,,,,,,,,,,,,,1
/GST,ON
/PLO,INFO,3
/GRO,CURL,ON
/CPLANE,1
WPSTYLE,,,,,,,,0
RESUME,'complex_beam','db','.'
/COM,ANSYS RELEASE 12.1    UP20091102       19:53:53    10/23/2016
/POST1
PLDISP,1
/PSF,DEFA, ,1,0,1
/PBF,DEFA, ,1
/PIC,DEFA, ,1
/PSYMB,CS,0
/PSYMB,NDIR,0
/PSYMB,ESYS,0
/PSYMB,LDIV,0
/PSYMB,LDIR,0
/PSYMB,ADIR,0
/PSYMB,ECON,0
/PSYMB,XNODE,0
/PSYMB,DOT,1
/PSYMB,PCONV,
/PSYMB,LAYR,0
/PSYMB,FBCS,0
/PBC,ALL,,1
/PBC,NFOR,,0
/PBC,NMOM,,0
/PBC,RFOR,,0
/PBC,RMOM,,0
/PBC,PATH,,0
FINISH
! /EXIT,ALL
/BATCH
/COM,ANSYS RELEASE 12.1    UP20091102       20:00:23    10/23/2016
/input,menust,tmp,'',,,,,,,,,,,,,,,,1
/GST,ON
/PLO,INFO,3
/GRO,CURL,ON
/CPLANE,1
WPSTYLE,,,,,,,,0
/COM,ANSYS RELEASE 12.1    UP20091102       19:45:12    10/23/2016
/input,menust,tmp,'',,,,,,,,,,,,,,,,1
/GST,ON
/PLO,INFO,3
/GRO,CURL,ON
/CPLANE,1
WPSTYLE,,,,,,,,0
/NOPR
/PMETH,OFF,0
KEYW,PR_SET,1
KEYW,PR_STRUC,1
KEYW,PR_THERM,0
KEYW,PR_FLUID,0
KEYW,PR_ELMAG,0
KEYW,MAGNOD,0
KEYW,MAGEDG,0
KEYW,MAGHFE,0
KEYW,MAGELC,0
KEYW,PR_MULTI,0
KEYW,PR_CFD,0
/GO
/COM,
/COM,Preferences for GUI filtering have been set to display:
/COM,  Structural
/PREP7
ET,1,BEAM4
R,1,0.0001,8.3e-10,8.3e-10, , , ,
RMORE, ,1.58e-9, , , , ,
MPTEMP,,,,,,,,
MPTEMP,1,0
MPDATA,EX,1,,2.04e11
MPDATA,PRXY,1,,0.33
K,1,0,0,0,
K,2,1/4,0,0,
K,3,1/2,0,0,
K,4,3/4,0,0,
K,5,1,0,0,
K,6,1,1/2,0,
K,7,3/4,1/2,0,
K,8,1/2,1/2,0,
K,9,1/4,1/2,0,
K,10,0,1/2,0,
K,11,0,0,1/2,
K,12,1/4,0,1/2,
K,13,1/2,0,1/2,
K,14,3/4,0,1/2,
K,15,1,0,1/2,
K,16,1,1/2,1/2,
K,17,3/4,1/2,1/2,
K,18,1/2,1/2,1/2,
K,19,1/4,1/2,1/2,
K,20,0,1/2,1/2,
LSTR,       1,       2
LSTR,       2,       3
LSTR,       3,       4
LSTR,       4,       5
LSTR,       5,       6
LSTR,       6,       7
LSTR,       7,       8
LSTR,       8,       9
LSTR,       9,      10
LSTR,      10,       1
LSTR,      11,      12
LSTR,      12,      13
LSTR,      13,      14
LSTR,      14,      15
LSTR,      15,      16
LSTR,      16,      17
LSTR,      17,      18
LSTR,      18,      19
LSTR,      19,      20
LSTR,      20,      11
LSTR,      20,      10
LSTR,      11,       1
LSTR,      16,       6
LSTR,      15,       5
LSTR,       1,       9
LSTR,       9,       2
LSTR,       9,       3
LSTR,       3,       7
LSTR,       7,       4
LSTR,       7,       5
LSTR,       8,       3
LSTR,      11,      19
LSTR,      19,      13
LSTR,      19,      12
LSTR,      18,      13
LSTR,      13,      17
LSTR,      17,      15
LSTR,      17,      14
LSTR,      19,       9
LSTR,      18,       8
LSTR,      17,       7
LSTR,      14,       4
LSTR,      13,       3
LSTR,      12,       2
LESIZE,ALL, , ,2, ,1, , ,1,
KPLOT
/NUMBER,0
LPLOT
FLST,2,44,4,ORDE,2
FITEM,2,1
FITEM,2,-44
LMESH,P51X
KPLOT
LPLOT
FLST,2,6,3,ORDE,6
FITEM,2,1
FITEM,2,5
FITEM,2,10
FITEM,2,15
FITEM,2,-16
FITEM,2,20
FLST,2,8,3,ORDE,8
FITEM,2,1
FITEM,2,5
FITEM,2,-6
FITEM,2,10
FITEM,2,-11
FITEM,2,15
FITEM,2,-16
FITEM,2,20
/GO
DK,P51X, ,0, ,0,ALL, , , , , ,
FLST,2,1,3,ORDE,1
FITEM,2,8
/GO
FK,P51X,FY,-100
FLST,2,1,3,ORDE,1
FITEM,2,18
/GO
FK,P51X,FY,-100
FINISH
/SOL
/STATUS,SOLU
SOLVE
FINISH
/POST1
PLDISP,1
FINISH
! /EXIT,ALL
/COM,ANSYS RELEASE 12.1    UP20091102       19:52:30    10/23/2016
/input,menust,tmp,'',,,,,,,,,,,,,,,,1
/GST,ON
/PLO,INFO,3
/GRO,CURL,ON
/CPLANE,1
WPSTYLE,,,,,,,,0
RESUME,'complex_beam','db','.'
/COM,ANSYS RELEASE 12.1    UP20091102       20:00:59    10/23/2016
/COM,ANSYS RELEASE 12.1    UP20091102       19:52:35    10/23/2016
/POST1
PLDISP,1
FINISH
! /EXIT,NOSAV
FINISH
! /EXIT,ALL
/BATCH
/COM,ANSYS RELEASE 12.1    UP20091102       20:01:52    10/23/2016
/input,menust,tmp,'',,,,,,,,,,,,,,,,1
/GST,ON
/PLO,INFO,3
/GRO,CURL,ON
/CPLANE,1
WPSTYLE,,,,,,,,0
/COM,ANSYS RELEASE 12.1    UP20091102       19:45:12    10/23/2016
/input,menust,tmp,'',,,,,,,,,,,,,,,,1
/GST,ON
/PLO,INFO,3
/GRO,CURL,ON
/CPLANE,1
WPSTYLE,,,,,,,,0
/NOPR
/PMETH,OFF,0
KEYW,PR_SET,1
KEYW,PR_STRUC,1
KEYW,PR_THERM,0
KEYW,PR_FLUID,0
KEYW,PR_ELMAG,0
KEYW,MAGNOD,0
KEYW,MAGEDG,0
KEYW,MAGHFE,0
KEYW,MAGELC,0
KEYW,PR_MULTI,0
KEYW,PR_CFD,0
/GO
/COM,
/COM,Preferences for GUI filtering have been set to display:
/COM,  Structural
/PREP7
ET,1,BEAM4
R,1,0.0001,8.3e-10,8.3e-10, , , ,
RMORE, ,1.58e-9, , , , ,
MPTEMP,,,,,,,,
MPTEMP,1,0
MPDATA,EX,1,,2.04e11
MPDATA,PRXY,1,,0.33
K,1,0,0,0,
K,2,1/4,0,0,
K,3,1/2,0,0,
K,4,3/4,0,0,
K,5,1,0,0,
K,6,1,1/2,0,
K,7,3/4,1/2,0,
K,8,1/2,1/2,0,
K,9,1/4,1/2,0,
K,10,0,1/2,0,
K,11,0,0,1/2,
K,12,1/4,0,1/2,
K,13,1/2,0,1/2,
K,14,3/4,0,1/2,
K,15,1,0,1/2,
K,16,1,1/2,1/2,
K,17,3/4,1/2,1/2,
K,18,1/2,1/2,1/2,
K,19,1/4,1/2,1/2,
K,20,0,1/2,1/2,
LSTR,       1,       2
LSTR,       2,       3
LSTR,       3,       4
LSTR,       4,       5
LSTR,       5,       6
LSTR,       6,       7
LSTR,       7,       8
LSTR,       8,       9
LSTR,       9,      10
LSTR,      10,       1
LSTR,      11,      12
LSTR,      12,      13
LSTR,      13,      14
LSTR,      14,      15
LSTR,      15,      16
LSTR,      16,      17
LSTR,      17,      18
LSTR,      18,      19
LSTR,      19,      20
LSTR,      20,      11
LSTR,      20,      10
LSTR,      11,       1
LSTR,      16,       6
LSTR,      15,       5
LSTR,       1,       9
LSTR,       9,       2
LSTR,       9,       3
LSTR,       3,       7
LSTR,       7,       4
LSTR,       7,       5
LSTR,       8,       3
LSTR,      11,      19
LSTR,      19,      13
LSTR,      19,      12
LSTR,      18,      13
LSTR,      13,      17
LSTR,      17,      15
LSTR,      17,      14
LSTR,      19,       9
LSTR,      18,       8
LSTR,      17,       7
LSTR,      14,       4
LSTR,      13,       3
LSTR,      12,       2
LESIZE,ALL, , ,5, ,1, , ,1,
KPLOT
/NUMBER,0
LPLOT
FLST,2,44,4,ORDE,2
FITEM,2,1
FITEM,2,-44
LMESH,P51X
KPLOT
LPLOT
FLST,2,6,3,ORDE,6
FITEM,2,1
FITEM,2,5
FITEM,2,10
FITEM,2,15
FITEM,2,-16
FITEM,2,20
FLST,2,8,3,ORDE,8
FITEM,2,1
FITEM,2,5
FITEM,2,-6
FITEM,2,10
FITEM,2,-11
FITEM,2,15
FITEM,2,-16
FITEM,2,20
/GO
DK,P51X, ,0, ,0,ALL, , , , , ,
FLST,2,1,3,ORDE,1
FITEM,2,8
/GO
FK,P51X,FY,-100
FLST,2,1,3,ORDE,1
FITEM,2,18
/GO
FK,P51X,FY,-100
FINISH
/SOL
/STATUS,SOLU
SOLVE
FINISH
/POST1
PLDISP,1
FINISH
! /EXIT,ALL
/COM,ANSYS RELEASE 12.1    UP20091102       19:52:30    10/23/2016
/input,menust,tmp,'',,,,,,,,,,,,,,,,1
/GST,ON
/PLO,INFO,3
/GRO,CURL,ON
/CPLANE,1
WPSTYLE,,,,,,,,0
RESUME,'complex_beam','db','.'
/COM,ANSYS RELEASE 12.1    UP20091102       20:02:00    10/23/2016
/COM,ANSYS RELEASE 12.1    UP20091102       19:52:35    10/23/2016
/POST1
PLDISP,1
FINISH
! /EXIT,NOSAV
FINISH
! /EXIT,NOSAV
/BATCH
/COM,ANSYS RELEASE 12.1    UP20091102       20:03:03    10/23/2016
/input,menust,tmp,'',,,,,,,,,,,,,,,,1
/GST,ON
/PLO,INFO,3
/GRO,CURL,ON
/CPLANE,1
WPSTYLE,,,,,,,,0
/COM,ANSYS RELEASE 12.1    UP20091102       19:45:12    10/23/2016
/input,menust,tmp,'',,,,,,,,,,,,,,,,1
/GST,ON
/PLO,INFO,3
/GRO,CURL,ON
/CPLANE,1
WPSTYLE,,,,,,,,0
/NOPR
/PMETH,OFF,0
KEYW,PR_SET,1
KEYW,PR_STRUC,1
KEYW,PR_THERM,0
KEYW,PR_FLUID,0
KEYW,PR_ELMAG,0
KEYW,MAGNOD,0
KEYW,MAGEDG,0
KEYW,MAGHFE,0
KEYW,MAGELC,0
KEYW,PR_MULTI,0
KEYW,PR_CFD,0
/GO
/COM,
/COM,Preferences for GUI filtering have been set to display:
/COM,  Structural
/PREP7
ET,1,BEAM4
R,1,0.0001,8.3e-10,8.3e-10, , , ,
RMORE, ,1.58e-9, , , , ,
MPTEMP,,,,,,,,
MPTEMP,1,0
MPDATA,EX,1,,2.04e11
MPDATA,PRXY,1,,0.33
K,1,0,0,0,
K,2,1/4,0,0,
K,3,1/2,0,0,
K,4,3/4,0,0,
K,5,1,0,0,
K,6,1,1/2,0,
K,7,3/4,1/2,0,
K,8,1/2,1/2,0,
K,9,1/4,1/2,0,
K,10,0,1/2,0,
K,11,0,0,1/2,
K,12,1/4,0,1/2,
K,13,1/2,0,1/2,
K,14,3/4,0,1/2,
K,15,1,0,1/2,
K,16,1,1/2,1/2,
K,17,3/4,1/2,1/2,
K,18,1/2,1/2,1/2,
K,19,1/4,1/2,1/2,
K,20,0,1/2,1/2,
LSTR,       1,       2
LSTR,       2,       3
LSTR,       3,       4
LSTR,       4,       5
LSTR,       5,       6
LSTR,       6,       7
LSTR,       7,       8
LSTR,       8,       9
LSTR,       9,      10
LSTR,      10,       1
LSTR,      11,      12
LSTR,      12,      13
LSTR,      13,      14
LSTR,      14,      15
LSTR,      15,      16
LSTR,      16,      17
LSTR,      17,      18
LSTR,      18,      19
LSTR,      19,      20
LSTR,      20,      11
LSTR,      20,      10
LSTR,      11,       1
LSTR,      16,       6
LSTR,      15,       5
LSTR,       1,       9
LSTR,       9,       2
LSTR,       9,       3
LSTR,       3,       7
LSTR,       7,       4
LSTR,       7,       5
LSTR,       8,       3
LSTR,      11,      19
LSTR,      19,      13
LSTR,      19,      12
LSTR,      18,      13
LSTR,      13,      17
LSTR,      17,      15
LSTR,      17,      14
LSTR,      19,       9
LSTR,      18,       8
LSTR,      17,       7
LSTR,      14,       4
LSTR,      13,       3
LSTR,      12,       2
LESIZE,ALL, , ,10, ,1, , ,1,
KPLOT
/NUMBER,0
LPLOT
FLST,2,44,4,ORDE,2
FITEM,2,1
FITEM,2,-44
LMESH,P51X
KPLOT
LPLOT
FLST,2,6,3,ORDE,6
FITEM,2,1
FITEM,2,5
FITEM,2,10
FITEM,2,15
FITEM,2,-16
FITEM,2,20
FLST,2,8,3,ORDE,8
FITEM,2,1
FITEM,2,5
FITEM,2,-6
FITEM,2,10
FITEM,2,-11
FITEM,2,15
FITEM,2,-16
FITEM,2,20
/GO
DK,P51X, ,0, ,0,ALL, , , , , ,
FLST,2,1,3,ORDE,1
FITEM,2,8
/GO
FK,P51X,FY,-100
FLST,2,1,3,ORDE,1
FITEM,2,18
/GO
FK,P51X,FY,-100
FINISH
/SOL
/STATUS,SOLU
SOLVE
FINISH
/POST1
PLDISP,1
FINISH
! /EXIT,ALL
/COM,ANSYS RELEASE 12.1    UP20091102       19:52:30    10/23/2016
/input,menust,tmp,'',,,,,,,,,,,,,,,,1
/GST,ON
/PLO,INFO,3
/GRO,CURL,ON
/CPLANE,1
WPSTYLE,,,,,,,,0
RESUME,'complex_beam','db','.'
/COM,ANSYS RELEASE 12.1    UP20091102       20:03:11    10/23/2016
/COM,ANSYS RELEASE 12.1    UP20091102       19:52:35    10/23/2016
/POST1
PLDISP,1
FINISH
! /EXIT,NOSAV
FINISH
! /EXIT,NOSAV
/BATCH
/COM,ANSYS RELEASE 12.1    UP20091102       20:03:56    10/23/2016
/input,menust,tmp,'',,,,,,,,,,,,,,,,1
/GST,ON
/PLO,INFO,3
/GRO,CURL,ON
/CPLANE,1
WPSTYLE,,,,,,,,0
/COM,ANSYS RELEASE 12.1    UP20091102       19:45:12    10/23/2016
/input,menust,tmp,'',,,,,,,,,,,,,,,,1
/GST,ON
/PLO,INFO,3
/GRO,CURL,ON
/CPLANE,1
WPSTYLE,,,,,,,,0
/NOPR
/PMETH,OFF,0
KEYW,PR_SET,1
KEYW,PR_STRUC,1
KEYW,PR_THERM,0
KEYW,PR_FLUID,0
KEYW,PR_ELMAG,0
KEYW,MAGNOD,0
KEYW,MAGEDG,0
KEYW,MAGHFE,0
KEYW,MAGELC,0
KEYW,PR_MULTI,0
KEYW,PR_CFD,0
/GO
/COM,
/COM,Preferences for GUI filtering have been set to display:
/COM,  Structural
/PREP7
ET,1,BEAM4
R,1,0.0001,8.3e-10,8.3e-10, , , ,
RMORE, ,1.58e-9, , , , ,
MPTEMP,,,,,,,,
MPTEMP,1,0
MPDATA,EX,1,,2.04e11
MPDATA,PRXY,1,,0.33
K,1,0,0,0,
K,2,1/4,0,0,
K,3,1/2,0,0,
K,4,3/4,0,0,
K,5,1,0,0,
K,6,1,1/2,0,
K,7,3/4,1/2,0,
K,8,1/2,1/2,0,
K,9,1/4,1/2,0,
K,10,0,1/2,0,
K,11,0,0,1/2,
K,12,1/4,0,1/2,
K,13,1/2,0,1/2,
K,14,3/4,0,1/2,
K,15,1,0,1/2,
K,16,1,1/2,1/2,
K,17,3/4,1/2,1/2,
K,18,1/2,1/2,1/2,
K,19,1/4,1/2,1/2,
K,20,0,1/2,1/2,
LSTR,       1,       2
LSTR,       2,       3
LSTR,       3,       4
LSTR,       4,       5
LSTR,       5,       6
LSTR,       6,       7
LSTR,       7,       8
LSTR,       8,       9
LSTR,       9,      10
LSTR,      10,       1
LSTR,      11,      12
LSTR,      12,      13
LSTR,      13,      14
LSTR,      14,      15
LSTR,      15,      16
LSTR,      16,      17
LSTR,      17,      18
LSTR,      18,      19
LSTR,      19,      20
LSTR,      20,      11
LSTR,      20,      10
LSTR,      11,       1
LSTR,      16,       6
LSTR,      15,       5
LSTR,       1,       9
LSTR,       9,       2
LSTR,       9,       3
LSTR,       3,       7
LSTR,       7,       4
LSTR,       7,       5
LSTR,       8,       3
LSTR,      11,      19
LSTR,      19,      13
LSTR,      19,      12
LSTR,      18,      13
LSTR,      13,      17
LSTR,      17,      15
LSTR,      17,      14
LSTR,      19,       9
LSTR,      18,       8
LSTR,      17,       7
LSTR,      14,       4
LSTR,      13,       3
LSTR,      12,       2
LESIZE,ALL, , ,50, ,1, , ,1,
KPLOT
/NUMBER,0
LPLOT
FLST,2,44,4,ORDE,2
FITEM,2,1
FITEM,2,-44
LMESH,P51X
KPLOT
LPLOT
FLST,2,6,3,ORDE,6
FITEM,2,1
FITEM,2,5
FITEM,2,10
FITEM,2,15
FITEM,2,-16
FITEM,2,20
FLST,2,8,3,ORDE,8
FITEM,2,1
FITEM,2,5
FITEM,2,-6
FITEM,2,10
FITEM,2,-11
FITEM,2,15
FITEM,2,-16
FITEM,2,20
/GO
DK,P51X, ,0, ,0,ALL, , , , , ,
FLST,2,1,3,ORDE,1
FITEM,2,8
/GO
FK,P51X,FY,-100
FLST,2,1,3,ORDE,1
FITEM,2,18
/GO
FK,P51X,FY,-100
FINISH
/SOL
/STATUS,SOLU
SOLVE
FINISH
/POST1
PLDISP,1
FINISH
! /EXIT,ALL
/COM,ANSYS RELEASE 12.1    UP20091102       19:52:30    10/23/2016
/input,menust,tmp,'',,,,,,,,,,,,,,,,1
/GST,ON
/PLO,INFO,3
/GRO,CURL,ON
/CPLANE,1
WPSTYLE,,,,,,,,0
RESUME,'complex_beam','db','.'
/COM,ANSYS RELEASE 12.1    UP20091102       20:04:04    10/23/2016
/COM,ANSYS RELEASE 12.1    UP20091102       19:52:35    10/23/2016
/POST1
PLDISP,1
FINISH
! /EXIT,NOSAV
/POST1
PLDISP,1
/PSF,DEFA, ,1,0,1
/PBF,DEFA, ,1
/PIC,DEFA, ,1
/PSYMB,CS,0
/PSYMB,NDIR,0
/PSYMB,ESYS,0
/PSYMB,LDIV,0
/PSYMB,LDIR,0
/PSYMB,ADIR,0
/PSYMB,ECON,0
/PSYMB,XNODE,0
/PSYMB,DOT,1
/PSYMB,PCONV,
/PSYMB,LAYR,0
/PSYMB,FBCS,0
/PBC,ALL,,1
/PBC,NFOR,,0
/PBC,NMOM,,0
/PBC,RFOR,,0
/PBC,RMOM,,0
/PBC,PATH,,0
FINISH
! /EXIT,ALL
